	<?xml version="1.0"?>

<!-------- gravity="0 -9.81 0" --------------->

<Node name="root" gravity="0 -9.81 0" dt="0.02">

	<RequiredPlugin name="Sofa.Component.ODESolver.Backward"/> <!-- Needed to use components [EulerImplicitSolver] -->
    <RequiredPlugin name="Sofa.Component.LinearSolver.Iterative"/> <!-- Needed to use components [CGLinearSolver] -->

	<RequiredPlugin name="Sofa.Component.IO.Mesh"/> <!-- Needed to use components [MeshGmshLoader MeshOBJLoader SphereLoader] -->
	<RequiredPlugin name="Sofa.Component.Topology.Container.Constant"/> <!-- Needed to use components [MeshTopology] -->
	<RequiredPlugin name="Sofa.Component.Topology.Container.Dynamic"/> <!-- Needed to use components [TetrahedronSetTopologyContainer] -->

	<RequiredPlugin name="Sofa.Component.StateContainer"/> <!-- Needed to use components [MechanicalObject] -->
	<RequiredPlugin name="Sofa.Component.Engine.Transform"/> <!-- Needed to use components [TransformEngine] -->


	<RequiredPlugin name="Sofa.Component.Collision.Detection.Algorithm"/> <!-- Needed to use components [CollisionPipeline] -->
	<RequiredPlugin name="Sofa.Component.Collision.Detection.Intersection"/> <!-- Needed to use components [DiscreteIntersection] -->
	<RequiredPlugin name="Sofa.Component.Collision.Response.Contact"/> <!-- Needed to use components [DefaultContactManager] -->
	<RequiredPlugin name="Sofa.Component.Collision.Geometry"/> <!-- Needed to use components [TriangleCollisionModel] -->

	<RequiredPlugin name="Sofa.Component.Mass"/> <!-- Needed to use components [Mass] -->
	<RequiredPlugin name="Sofa.Component.MechanicalLoad"/> <!-- Needed to use components [PlaneForceField] -->
	<RequiredPlugin name="Sofa.Component.SolidMechanics.Spring"/> <!-- Needed to use components [MeshSpringForceField] -->
	<RequiredPlugin name="Sofa.Component.SolidMechanics.FEM.Elastic"/> <!-- Needed to use components [TetrahedronFEMForceField] -->
	<RequiredPlugin name="Sofa.Component.Constraint.Projective"/> <!-- Needed to use components [FixedConstraint] -->


	<RequiredPlugin name="Sofa.Component.Visual"/> <!-- Needed to use components [VisualStyle] -->
	<RequiredPlugin name="Sofa.GL.Component.Rendering3D"/> <!-- Needed to use components [OglModel] -->
	<RequiredPlugin name="Sofa.Component.SceneUtility"/>
	<RequiredPlugin name="Sofa.Component.Mapping.Linear"/> <!-- Needed to use components [BarycentricMapping] -->


	<!----------------------------------->

	<DefaultAnimationLoop/>
	<MeshGmshLoader name="mesh_Liver" filename="mesh/liver.msh" />
	<MeshOBJLoader name="mesh_Liver_fine" filename="mesh/liver-smooth.obj" />

	<!---------- Collisions solver -------------->
	<CollisionPipeline name="CollisionPipeline" verbose="0" draw="0" />
	<BruteForceBroadPhase name="Brute_F_N2" />  	 											<!-- Broad Phase -->
	<BVHNarrowPhase/>																			<!-- Narrow Phase -->
    <DefaultContactManager name="collision response" response="PenalityContactForceField" />	<!-- Response -->
	<DiscreteIntersection/>

	<!---------- Collisions solver-------------->


    <Node name="Liver">
		<!--------- Solvers -------------------->
		<EulerImplicitSolver name="EulerImplicit"  rayleighStiffness="0.1" rayleighMass="0.1" />
		<CGLinearSolver name="CG Solver" iterations="200" tolerance="1e-5" threshold="1e-5"/>
		<!--------- Solvers -------------------->
		<!--------- Containers ------------------>

        <TetrahedronSetTopologyContainer name="topo" src="@../mesh_Liver" />
		<MechanicalObject name="Liver_DOFs" src="@../mesh_Liver" />
		<TetrahedronSetGeometryAlgorithms template="Vec3" name="GeomAlgo" drawTetrahedra ="0" />  						<!-- drawTetrahedra -->

		<!--------- Containers ------------------>
		<!--------- Mechanical props ------------------>

		<TetrahedronFEMForceField template="Vec3" name="FEM" youngModulus="2000" poissonRatio="0.3"/>
		<MeshMatrixMass massDensity="1" />

		<!--------- Mechanical props ------------------>
		<!--------- Forces ------------------>

		<ConstantForceField indices="0" forces="0 0 0" />
		<FixedConstraint name="FixedConstraint" indices="3 21 39 56 64" />

		<!--------- Forces ------------------>
		<!--------- Visualisation -------------------->

			<Node name="Visu" tags="Visual">
				<VisualStyle name="Vis_setting" displayFlags="showVisual showBehaviorModels"/>                         <!--showBehavior-->
				<OglModel name="Visual_model" src="@../../mesh_Liver_fine" />
				<BarycentricMapping name="visual mapping" input="@../Liver_DOFs" output="@Visual_model" />

			</Node >
		<!--------- Visualisation -------------------->
		<!--------- Collisions -------------------->
			<Node name="Collisions">
				<MeshTopology name="mesh_collision_fine" src="@../../mesh_Liver_fine" />
				<MechanicalObject name="Store_Forces" scale="1.0" />
				<TriangleCollisionModel name="CollisionModel" contactStiffness="3" selfCollision="0" group="1"/>
				<BarycentricMapping name="CollisionMapping" input="@../Liver_DOFs" output="@Store_Forces" />
			</Node >
		<!--------- Collisions -------------------->

    </Node>

</Node>
