<?xml version="1.0"?>
<Node name="root" gravity="0 -9.81 0" dt="0.01" >
    <RequiredPlugin name="Sofa.Component.Collision.Detection.Algorithm"/> <!-- Needed to use components [BVHNarrowPhase BruteForceBroadPhase CollisionPipeline] -->
    <RequiredPlugin name="Sofa.Component.Collision.Detection.Intersection"/> <!-- Needed to use components [MinProximityIntersection] -->
    <RequiredPlugin name="Sofa.Component.Collision.Geometry"/> <!-- Needed to use components [LineCollisionModel PointCollisionModel TriangleCollisionModel] -->
    <RequiredPlugin name="Sofa.Component.Collision.Response.Contact"/> <!-- Needed to use components [DefaultContactManager] -->
    <RequiredPlugin name="Sofa.Component.IO.Mesh"/> <!-- Needed to use components [MeshOBJLoader] -->
    <RequiredPlugin name="Sofa.Component.LinearSolver.Iterative"/> <!-- Needed to use components [CGLinearSolver] -->
    <RequiredPlugin name="Sofa.Component.Mapping.Linear"/> <!-- Needed to use components [BarycentricMapping] -->
    <RequiredPlugin name="Sofa.Component.Mass"/> <!-- Needed to use components [UniformMass] -->
    <RequiredPlugin name="Sofa.Component.ODESolver.Backward"/> <!-- Needed to use components [EulerImplicitSolver] -->
    <RequiredPlugin name="Sofa.Component.SolidMechanics.Spring"/> <!-- Needed to use components [RegularGridSpringForceField] -->
    <RequiredPlugin name="Sofa.Component.StateContainer"/> <!-- Needed to use components [MechanicalObject] -->
    <RequiredPlugin name="Sofa.Component.Topology.Container.Constant"/> <!-- Needed to use components [MeshTopology] -->
    <RequiredPlugin name="Sofa.Component.Topology.Container.Grid"/> <!-- Needed to use components [RegularGridTopology] -->
    <RequiredPlugin name="Sofa.GL.Component.Rendering3D"/> <!-- Needed to use components [OglModel] -->

    <RequiredPlugin name="Sofa.Component.Constraint.Projective"/> <!-- Needed to use components [FixedConstraint] -->
    <RequiredPlugin name="Sofa.Component.Topology.Container.Dynamic"/> <!-- Needed to use components [TetrahedronSetGeometryAlgorithms] -->
    <RequiredPlugin name="Sofa.Component.Visual"/> <!-- Needed to use components [VisualStyle] -->
    <RequiredPlugin name="Sofa.Component.SceneUtility"/> <!-- Needed to use components [InfoComponent] -->


    <CollisionPipeline verbose="0" depth="10" draw="0" />
    <DefaultAnimationLoop/>
    <BruteForceBroadPhase/>
    <BVHNarrowPhase/>
    <MinProximityIntersection name="Proximity" alarmDistance="0.5" contactDistance="0.05" />
    <DefaultContactManager name="Response" response="PenalityContactForceField" />

    <MeshOBJLoader name='Loader-torus' filename='mesh/torus.obj'/>
	<MeshOBJLoader name='Loader_Liver_fine' filename='mesh/liver-smooth.obj' />
	<!-- <MeshOBJLoader name='Loader_Liver_fine' filename='C:/Users/Sharkoon/Dropbox/SANO/Meshes/Liver_Przemek_vedo.obj' /> -->
	<MeshOBJLoader name='Loader-floor' filename='mesh/floor2.obj'/>

    <Node name="Liver">
		<EulerImplicitSolver name="EulerImplicit"  rayleighStiffness="0.1" rayleighMass="0.1" />
		<CGLinearSolver name="linear solver" iterations="25" tolerance="1.0e-9" threshold="1.0e-9"/>
		<MechanicalObject name="Liver_DOFs"/>
		<!-- <UniformMass totalMass="1" /> -->
		<CaribouMass density="2.5" lumped="true" topology="@topology" />

	    <RegularGridTopology name="Liver_Grid"/>
        <RegularGridSpringForceField name="Springs" stiffness="800" damping="1" />

		<VisualStyle name="Vis_setting" displayFlags="showCollisionModels"/>

		<Node name="Visu_Liver" tags="Visual">
			<OglModel name="Visual" src="@../../Loader_Liver_fine" />
			<BarycentricMapping name="visual mapping" input="@../Liver_DOFs" output="@Visual" />
		</Node >
		<Node name="Collisions">
			<MeshTopology name="mesh_collision" src="@../../Loader_Liver_fine" />
			<MechanicalObject name="Store_Forces" src="@../../Loader_Liver_fine" />
            <TriangleCollisionModel />
            <LineCollisionModel />
            <PointCollisionModel />
            <BarycentricMapping />
		</Node >

    </Node>

<!--

    <Node name="Torus">
        <EulerImplicitSolver name="cg_odesolver" printLog="false"  rayleighStiffness="0.1" rayleighMass="0.1" />
        <CGLinearSolver iterations="25" name="linear solver" tolerance="1.0e-9" threshold="1.0e-9" />

        <MechanicalObject name="Torus_DOFs" template="Vec3d" dx="5" dy="3" dz="3" />
        <UniformMass totalMass="10" />
        <RegularGridTopology name="Torus_Grid" nx="6" ny="5" nz="2" xmin="-7.5" xmax="7.5" ymin="-6" ymax="6" zmin="-1.75" zmax="1.75" />
        <RegularGridSpringForceField name="Springs" stiffness="350" damping="1" />

		<VisualStyle name="Vis_setting" displayFlags="showCollisionModels"/>

        <Node name="VisuTorus" tags="Visual">
            <OglModel name="Visual" src="@../../Loader-torus" color="blue" />
            <BarycentricMapping input="@.." output="@Visual" />
        </Node>
        <Node name="Surf">
            <MeshTopology src="@../../Loader-torus" />
            <MechanicalObject src="@../../Loader-torus"/>
            <TriangleCollisionModel />
            <LineCollisionModel />
            <PointCollisionModel />
            <BarycentricMapping />
        </Node>
    </Node>

    <Node name="Floor">
        <MeshTopology src="@../Loader-floor" />
        <MechanicalObject src="@../Loader-floor" dy="0" scale="0.2" />
        <TriangleCollisionModel name="FloorTriangleModel" simulated="0" moving="0" />
        <LineCollisionModel name="FloorLineModel" simulated="0" moving="0" />
        <PointCollisionModel name="FloorPointModel" simulated="0" moving="0" />

		<VisualStyle name="Vis_setting" displayFlags="showVisual"/>
        <OglModel name="FloorV" src="@../../Loader-floor" scale="0.2" dy="0" color="orange"/>
    </Node>

-->

</Node>
